// SBML level 2 version 4

model TDB()
  // TDB

  // Compartments:
  compartment unnamed = 1;

  // Species:
  species actTtiss in unnamed = 0;
  species Btiss in unnamed = KBp*Bpbo_perml*Vtissue;
  species TDBc_ugperkg in unnamed = 0;
  species actTpb in unnamed = 0;
  species drugBtisskill in unnamed = 0;
  species drugTtissact in unnamed;
  species restTtiss in unnamed = KTrp*Trpbo_perml*Vtissue;
  species TDBp_ugperkg in unnamed = 0;
  species restTpb in unnamed = (1 - depleteTpb)*Trpbo_perml*Vpb;
  species Bpb in unnamed = (1 - depleteBpb)*Bpbo_perml*Vpb;
  species TDBc_ugperml in unnamed;
  species TDBt_ugperml in unnamed;
  species drugTpbact in unnamed;
  species drugBpbkill in unnamed = 0;
  species restTtiss_perml in unnamed;
  species actTtiss_perml in unnamed;
  species Btiss_perml in unnamed;
  species restTpb_perml in unnamed;
  species actTpb_perml in unnamed;
  species Bpb_perml in unnamed;
  species BTrratio_pb in unnamed;
  species BTrratio_tiss in unnamed;
  species TaBratio_pb in unnamed;
  species TaBratio_tiss in unnamed;
  species Tafraction_pb in unnamed;
  species totTpb_perml in unnamed;
  species totTtiss_perml in unnamed;
  species act0Ttiss_perml in unnamed;
  species act0Tpb_perml in unnamed;
  species Tafraction_tiss in unnamed;
  species BAFF in unnamed = BAFFo;
  species Baffconsumption in unnamed;
  species act0Tpb in unnamed = 0;
  species act0Ttiss in unnamed = 0;
  species injection_effect in unnamed = 0;
  species Btiss2 in unnamed = KBp2*Bpbo_perml*Vtissue2;
  species act0Tpb_1 in unnamed = 0;
  species Bpb_1 in unnamed = 0;
  species restTpb_1 in unnamed = 2000000;
  species actTpb_1 in unnamed = 0;
  species act0Ttiss2 in unnamed = 0;
  species restTtiss2 in unnamed = KTrp2*Trpbo_perml*Vtissue2;
  species TDBt2_ugperml in unnamed;
  species drugTtissact2 in unnamed;
  species drugBtisskill2 in unnamed = 0;
  species actTtiss2 in unnamed = 0;
  species Tafraction_tiss2 in unnamed;
  species act0Ttiss2_perml in unnamed;
  species totTtiss2_perml in unnamed;
  species TaBratio_tiss2 in unnamed;
  species BTrratio_tiss2 in unnamed;
  species Btiss2_perml in unnamed;
  species actTtiss2_perml in unnamed;
  species restTtiss2_perml in unnamed;
  species RTXc_ugperkg in unnamed = 0;
  species RTXp_ugperkg in unnamed = 0;
  species RTXc_ugperml in unnamed;
  species RTXt_ugperml in unnamed;
  species RTXt2_ugperml in unnamed;
  species drug_effect in unnamed = 0;
  species B1920tiss3 in unnamed = Bpbref_perml*KBp3*Vtissue3;
  species B19no20tiss3 in unnamed = Bpbref_perml*KBp3*B19no20_B1920_ratio*Vtissue3;
  species restTtiss3 in unnamed = KTrp3*Trpbo_perml*Vtissue3;
  species act0Ttiss3 in unnamed = 0;
  species actTtiss3 in unnamed = 0;
  species drugTtissact3 in unnamed;
  species TDBt3_ugperml in unnamed;
  species B19Trratio_tiss3 in unnamed;
  species B19tiss3 in unnamed;
  species restTtiss3_perml in unnamed;
  species act0Ttiss3_perml in unnamed;
  species actTtiss3_perml in unnamed;
  species B19tiss3_perml in unnamed;
  species Tafraction_tiss3 in unnamed;
  species totTtiss3_perml in unnamed;
  species TaB19ratio_tiss3 in unnamed;
  species B19TtotRatio_tiss3 in unnamed = 0;
  species RTXt3_ugperml in unnamed;
  species drugBtisskill3 in unnamed = 0;
  species TaB1920ratio_tiss3 in unnamed;
  species B1920tiss3_perml in unnamed;
  species B1920Trratio_tiss3 in unnamed;
  species B19no20tiss3_perml in unnamed;
  species Blinc_ug in unnamed = 0;
  species Blinc_ngperml in unnamed;
  species BlinTpbact in unnamed;
  species BlinBpbkill in unnamed = 0;
  species BlinTtissact in unnamed;
  species BlinBtisskill in unnamed = 0;
  species Blint_ngperml in unnamed;
  species Blint2_ngperml in unnamed;
  species BlinBtisskill2 in unnamed = 0;
  species BlinTtissact2 in unnamed;
  species BlinBtisskill3 in unnamed = 0;
  species Blint3_ngperml in unnamed;
  species BlinTtissact3 in unnamed;
  species Bpb_norm in unnamed;
  species Tafraction_pb_init in unnamed = 0;
  species totTtiss in unnamed;
  species totTtiss2 in unnamed;
  species totTtiss3 in unnamed;
  species restTtumor in unnamed = KTrptumor*Trpbo_perml*Vtumor;
  species actTtumor in unnamed = 0;
  species Btumor in unnamed = KBptumor*Bpbo_perml*Vtumor;
  species act0Ttumor in unnamed = 0;
  species drugTtumoract in unnamed = 0;
  species drugBtumorkill in unnamed = 0;
  species BlinTtumoract in unnamed = 0;
  species BlinBtumorkill in unnamed = 0;
  species TDBtumor_ugperml in unnamed;
  species restTtumor_perml in unnamed;
  species act0Ttumor_perml in unnamed;
  species actTtumor_perml in unnamed;
  species Btumor_perml in unnamed;
  species Tafraction_tumor in unnamed;
  species BTrratio_tumor in unnamed;
  species TaBratio_tumor in unnamed;
  species totTtumor in unnamed;
  species totTtumor_perml in unnamed;
  species Blintumor_ngperml in unnamed;
  species RTXtumor_ugperml in unnamed;
  species BTtotRatio_tiss in unnamed;
  species BTtotRatio_tiss2 in unnamed;
  species TDBsc_ugperkg in unnamed = 0;
  species TDBc_ugperml_AUC in unnamed = 0;
  species IL6pb in unnamed = 0;
  species IL6tiss in unnamed = 0;
  species IL6tiss2 in unnamed = 0;
  species IL6tiss3 in unnamed = 0;
  species IL6tumor in unnamed = 0;
  species IL6combo in unnamed;

  // Parameters:
  VmB = 0.95;
  KmTB_kill = 0.75;
  KdrugB = 10 MWDERIVEDUNIT_nanogram__milliliter;
  kBapop = 0.03 MWDERIVEDUNIT_1__day;
  kBprolif = 0.7 MWDERIVEDUNIT_1__day;
  kTprolif = 0.7 MWDERIVEDUNIT_1__day;
  kBkill = 1;
  KdrugactT = 50 MWDERIVEDUNIT_nanogram__milliliter;
  VmT = 0.9;
  KmBT_act = 0.1;
  kTaexit = 1;
  kTact = 1;
  fTadeact = 0;
  fTap = 1;
  Cl_tdb = 3 MWDERIVEDUNIT_milliliter__day__kilogram;
  Cld_tdb = 25 MWDERIVEDUNIT_milliliter__day__kilogram;
  Vc_tdb = 35 MWDERIVEDUNIT_milliliter__kilogram;
  Vp_tdb = 110 MWDERIVEDUNIT_milliliter__kilogram;
  kTgen = 1 MWDERIVEDUNIT_1__day;
  kTaapop = 0.5;
  KTrp = 1;
  Trpbo_perml = 2000000 MWDERIVEDUNIT_1__milliliter;
  fTaprolif = 2;
  fBprolif = 0;
  Bpbo_perml = 1000000 MWDERIVEDUNIT_1__milliliter;
  fBexit = 1;
  KBp = 1;
  Kp = 0.14;
  Vpb = 40 MWBUILTINPREFIX_milli_MWBUILTINUNIT_liter;
  Vtissue = 40 MWBUILTINPREFIX_milli_MWBUILTINUNIT_liter;
  fTrapop = 0.1 MWDERIVEDUNIT_1__day;
  Trpbref_perml = 2000000 MWDERIVEDUNIT_1__milliliter;
  nkill = 2;
  KTrp2 = 0.02;
  Vm_tdb = 212 MWDERIVEDUNIT_microgram__day;
  Km_tdb = 4.74 MWDERIVEDUNIT_microgram__milliliter;
  BW = 3.4 kilogram;
  act0on = 1;
  kIL6prod = 1;
  fa0 = 0.5;
  fAICD = 1;
  kBAFFprod = 1;
  Bpbref_perml = 1000000;
  thBAFF = 30 MWBUILTINUNIT_minute;
  thalfIL6 = 20 MWBUILTINUNIT_minute;
  fTa0deact = 1;
  fTa0apop = 1;
  BAFFo = 1;
  fBAFFo = 0.1;
  tinjhalf = 1 MWBUILTINUNIT_day;
  finj = 0.1;
  KBp2 = 1;
  Vtissue2 = 1;
  Kp2 = 0.07;
  tissue2on = 0;
  Vc_rtx = 28;
  Vp_rtx = 9;
  Cl_rtx = 8;
  Cld_rtx = 23;
  Vm_rtx = 0;
  Km_rtx = 1;
  Kmkill_rtx = 25;
  fTgenbl = 0;
  depleteTpb = 0;
  depleteBpb = 0;
  kTrexit = 1;
  PKflag = 1;
  VPid = 1;
  end_time = 1;
  fdrug = 1;
  Vtissue3 = 1;
  KTrp3 = 500;
  tissue3on = 0;
  Kp3 = 0.07;
  kBtiss3exit = 0.03;
  KBp3 = 600;
  B19no20_B1920_ratio = 0.25;
  fvalidation = 0;
  fapop_v24 = 0;
  fBtissue3_v1 = 1;
  kBmat_kBapop_ratio = 0.25;
  ndrugactT = 1;
  Cl_blin = 22300;
  Vz_blin = 1610;
  KdrugactT_blin = 0.1 MWDERIVEDUNIT_nanogram__milliliter;
  ndrugactT_blin = 1;
  KmTB_kill_blin = 0.75;
  KdrugB_blin = 0.015 MWDERIVEDUNIT_nanogram__milliliter;
  nkill_blin = 1.027;
  KmBT_act_blin = 0.716;
  kBapop_cll = 1;
  kBgen_cll = 1;
  fBkill = 1;
  fTact = 1;
  fKmTB_kill = 1;
  Kptumor = 1;
  Vtumor = 1;
  KBptumor = 1;
  KTrptumor = 1;
  tumor_on = 0;
  IL6_tiss_contribution = 0.02;
  kBtumorprolif = 0.025;
  S = 1;
  tissue1on = 1;
  kabs_TDB = 1.4;
  fbio_TDB = 0.6;
  Bcell_tumor_trafficking_on = 1;

  // Assignment rules:
  TDBc_ugperml := PK_v26(TDBc_ugperkg, Vc_tdb, PKflag, VPid, time, end_time, fvalidation);
  TDBt_ugperml := Kp*TDBc_ugperml;
  TDBt2_ugperml := Kp2*TDBc_ugperml;
  TDBt3_ugperml := tissue3on*Kp3*TDBc_ugperml;
  TDBtumor_ugperml := tumor_on*Kptumor*TDBc_ugperml;
  RTXc_ugperml := (RTXc_ugperkg/Vc_rtx > 1e-5)*RTXc_ugperkg/Vc_rtx;
  RTXt_ugperml := RTXc_ugperml*Kp;
  RTXt2_ugperml := RTXc_ugperml*Kp2;
  RTXt3_ugperml := tissue3on*RTXc_ugperml*Kp3;
  RTXtumor_ugperml := tumor_on*RTXc_ugperml*Kptumor;
  Blinc_ngperml := Blinc_ug/Vz_blin*1000;
  Blint_ngperml := Kp*Blinc_ngperml;
  Blint2_ngperml := Kp2*Blinc_ngperml;
  Blint3_ngperml := tissue3on*Kp3*Blinc_ngperml;
  Blintumor_ngperml := tumor_on*Kptumor*Blinc_ngperml;
  restTpb_perml := restTpb/Vpb;
  restTtiss_perml := restTtiss/Vtissue;
  restTtiss2_perml := restTtiss2/Vtissue2;
  restTtiss3_perml := restTtiss3/Vtissue3;
  restTtumor_perml := restTtumor/Vtumor;
  act0Tpb_perml := act0Tpb/Vpb;
  act0Ttiss_perml := act0Ttiss/Vtissue;
  act0Ttiss2_perml := act0Ttiss2/Vtissue2;
  act0Ttiss3_perml := act0Ttiss3/Vtissue3;
  act0Ttumor_perml := act0Ttumor/Vtumor;
  actTpb_perml := actTpb/Vpb;
  actTtiss_perml := actTtiss/Vtissue;
  actTtiss2_perml := actTtiss2/Vtissue2;
  actTtiss3_perml := actTtiss3/Vtissue3;
  actTtumor_perml := actTtumor/Vtumor;
  B19tiss3 := B19no20tiss3 + B1920tiss3;
  Bpb_perml := Bpb/Vpb;
  Btiss_perml := Btiss/Vtissue;
  Btiss2_perml := Btiss2/Vtissue2;
  B19tiss3_perml := B19tiss3/Vtissue3;
  B1920tiss3_perml := B1920tiss3/Vtissue3;
  B19no20tiss3_perml := B19no20tiss3/Vtissue3;
  Btumor_perml := Btumor/Vtumor;
  BTrratio_pb := Bpb/max(restTpb + act0Tpb, 1);
  BTrratio_tiss := Btiss/max(restTtiss + act0Ttiss, 1);
  BTrratio_tiss2 := Btiss2/max(restTtiss2 + act0Ttiss2, 1);
  B19Trratio_tiss3 := B19tiss3/max(restTtiss3 + act0Ttiss3, 1);
  B1920Trratio_tiss3 := B1920tiss3/max(restTtiss3 + act0Ttiss3, 1);
  BTrratio_tumor := Btumor/max(restTtumor + act0Ttumor, 1);
  TaBratio_pb := actTpb/max(Bpb, 1);
  TaBratio_tiss := actTtiss/max(Btiss, 1);
  TaBratio_tiss2 := actTtiss2/max(Btiss2, 1);
  TaB19ratio_tiss3 := actTtiss3/max(B19tiss3, 1);
  TaB1920ratio_tiss3 := actTtiss3/max(B1920tiss3, 1);
  TaBratio_tumor := actTtumor/max(Btumor, 1);
  Tafraction_pb := actTpb_perml/max(totTpb_perml, 1);
  Tafraction_tiss := actTtiss_perml/max(totTtiss_perml, 1);
  Tafraction_tiss2 := actTtiss2_perml/max(totTtiss2_perml, 1);
  Tafraction_tiss3 := actTtiss3_perml/max(totTtiss3_perml, 1);
  Tafraction_tumor := actTtumor_perml/max(totTtumor_perml, 1);
  totTpb_perml := restTpb_perml + act0Tpb_perml + actTpb_perml;
  totTtiss_perml := restTtiss_perml + act0Ttiss_perml + actTtiss_perml;
  totTtiss2_perml := restTtiss2_perml + act0Ttiss2_perml + actTtiss2_perml;
  totTtiss3_perml := restTtiss3_perml + act0Ttiss3_perml + actTtiss3_perml;
  totTtumor_perml := restTtumor_perml + act0Ttumor_perml + actTtumor_perml;
  drugTpbact := VmT*(BTrratio_pb^S/(KmBT_act^S + BTrratio_pb^S))*((TDBc_ugperml*1000)^ndrugactT/(KdrugactT^ndrugactT + (TDBc_ugperml*1000)^ndrugactT));
  drugTtissact := fTact*VmT*(BTrratio_tiss^S/(KmBT_act^S + BTrratio_tiss^S))*((TDBt_ugperml*1000)^ndrugactT/(KdrugactT^ndrugactT + (TDBt_ugperml*1000)^ndrugactT));
  drugTtissact2 := fTact*VmT*(BTrratio_tiss2^S/(KmBT_act^S + BTrratio_tiss2^S))*((TDBt2_ugperml*1000)^ndrugactT/(KdrugactT^ndrugactT + (TDBt2_ugperml*1000)^ndrugactT));
  drugTtissact3 := fTact*VmT*(B1920Trratio_tiss3^S/(KmBT_act^S + B1920Trratio_tiss3^S))*((TDBt3_ugperml*1000)^ndrugactT/(KdrugactT^ndrugactT + (TDBt3_ugperml*1000)^ndrugactT));
  BlinTpbact := VmT*(BTrratio_pb^S/(KmBT_act_blin^S + BTrratio_pb^S))*(Blinc_ngperml^ndrugactT_blin/(Blinc_ngperml^ndrugactT_blin + KdrugactT_blin^ndrugactT_blin));
  BlinTtissact := fTact*VmT*(BTrratio_tiss^S/(KmBT_act_blin^S + BTrratio_tiss^S))*(Blint_ngperml^ndrugactT_blin/(Blint_ngperml^ndrugactT_blin + KdrugactT_blin^ndrugactT_blin));
  BlinTtissact2 := fTact*VmT*(BTrratio_tiss2^S/(KmBT_act_blin^S + BTrratio_tiss2^S))*(Blint2_ngperml^ndrugactT_blin/(Blint2_ngperml^ndrugactT_blin + KdrugactT_blin^ndrugactT_blin));
  BlinTtissact3 := fTact*VmT*(B19Trratio_tiss3^S/(KmBT_act_blin^S + B19Trratio_tiss3^S))*(Blint3_ngperml^ndrugactT_blin/(Blint3_ngperml^ndrugactT_blin + KdrugactT_blin^ndrugactT_blin));
  Bpb_norm := Bpb_perml/Bpbref_perml;
  totTtiss := restTtiss + act0Ttiss + actTtiss;
  totTtiss2 := restTtiss2 + act0Ttiss2 + actTtiss2;
  totTtiss3 := restTtiss3 + act0Ttiss3 + actTtiss3;
  totTtumor := restTtumor + act0Ttumor + actTtumor;
  Baffconsumption := ln(2)/thBAFF*BAFF*(Btiss + Bpb + Btiss2)/(Bpbref_perml*(Vpb + KBp*Vtissue + KBp2*Vtissue2));
  BTtotRatio_tiss := Btiss_perml/totTtiss_perml;
  BTtotRatio_tiss2 := Btiss2_perml/totTtiss2_perml;
  IL6combo := IL6pb + IL6_tiss_contribution*(IL6tiss*Vtissue + IL6tiss2*Vtissue2 + IL6tiss3*Vtissue3 + IL6tumor*Vtumor)/Vpb;

  // Reactions:
  Btiss_prolf: Btiss => 2 Btiss; kBprolif*KBp*Bpbref_perml*Vtissue*max(0, 1 - Btiss/(KBp*Bpbref_perml*Vtissue))^1;
  Ttiss_activn: restTtiss + drugTtissact + BlinTtissact -> actTtiss + drugTtissact + BlinTtissact; kTact*((drugTtissact + BlinTtissact)*restTtiss - fTadeact*actTtiss);
  Btiss_apop: Btiss => ; 0*fBprolif*kBprolif*Btiss*kBapop_cll;
  reaction_243: TDBc_ugperkg -> ; (Cl_tdb + Vm_tdb/(Km_tdb + TDBc_ugperkg/Vc_tdb)/BW)/Vc_tdb*TDBc_ugperkg; reaction_243 is "`";
  TDBdistr: TDBc_ugperkg -> TDBp_ugperkg; Cld_tdb*(TDBc_ugperkg/Vc_tdb - TDBp_ugperkg/Vp_tdb)*unnamed;
  UnnamedReaction_6: restTtiss + Btiss + drugTtissact + TDBt_ugperml => restTtiss + Btiss + drugTtissact + TDBt_ugperml + restTtiss; 0;
  UnnamedReaction_7: actTtiss + Btiss + drugBtisskill + TDBt_ugperml => actTtiss + Btiss + drugBtisskill + TDBt_ugperml; 0;
  restTtraffic: restTpb + injection_effect + drug_effect -> restTtiss + injection_effect + drug_effect; tissue1on*kTrexit*Vpb*((1 + finj*injection_effect + fdrug*drug_effect)*restTpb/Vpb*KTrp - restTtiss/Vtissue);
  Tgen: totTpb_perml => restTpb + totTpb_perml; ;
  Btraffic: Bpb => Btiss; tissue1on*fBexit*kTaexit*Vpb*max(0, Bpb/Vpb*KBp - Btiss/Vtissue);
  Tpb_activn: restTpb + drugTpbact + BlinTpbact -> actTpb + drugTpbact + BlinTpbact; kTact*((drugTpbact + BlinTpbact)*restTpb - fTadeact*actTpb);
  Bpb_prolif: Bpb => 2 Bpb; tissue3on*fBtissue3_v1*kBapop*Bpb*kBapop_cll;
  Bpb_apop: Bpb => ; kBapop*Bpb*kBapop_cll;
  UnnamedReaction_14: TDBc_ugperml + drugTpbact + Bpb => TDBc_ugperml + drugTpbact + Bpb; 0;
  UnnamedReaction_15: TDBc_ugperml + actTpb + drugBpbkill + Bpb => TDBc_ugperml + actTpb + drugBpbkill + Bpb; 0;
  Bpb_kill: actTpb + drugBpbkill + Bpb + RTXc_ugperml + BlinBpbkill => actTpb + drugBpbkill + RTXc_ugperml + BlinBpbkill; kBkill*(drugBpbkill + BlinBpbkill + RTXc_ugperml/(Kmkill_rtx/1000 + RTXc_ugperml))*Bpb;
  Btiss_kill: actTtiss + drugBtisskill + Btiss + RTXt_ugperml + BlinBtisskill => actTtiss + drugBtisskill + RTXt_ugperml + BlinBtisskill; fBkill*kBkill*(drugBtisskill + BlinBtisskill + RTXt_ugperml/(Kmkill_rtx/1000 + RTXt_ugperml))*Btiss;
  restTpb_apop: restTpb => ; kTgen*fTgenbl*restTpb + fTrapop*kTaapop*max(0, restTpb - Trpbref_perml*Vpb);
  actTtraffic: actTpb + injection_effect + drug_effect -> actTtiss + injection_effect + drug_effect; tissue1on*kTaexit*Vpb*((1 + fa0*(finj*injection_effect + fdrug*drug_effect))*actTpb/Vpb*KTrp*fTap - actTtiss/Vtissue);
  actTpb_apop: actTpb => ; kTaapop*(actTpb + fAICD*actTpb^2/(Vpb*Trpbref_perml));
  BAFFcons: BAFF + Btiss + Bpb + Btiss2 => Btiss + Bpb + Btiss2; ln(2)/(thBAFF/24/60)*(fBAFFo*BAFF/BAFFo + (1 - fBAFFo)*(Btiss + Bpb + Btiss2)/(Bpbref_perml*(Vpb + KBp*Vtissue + KBp2*Vtissue2)));
  BAFFprod: => BAFF; ln(2)/(thBAFF/24/60)*(fBAFFo + (1 - fBAFFo)*Bpbo_perml/Bpbref_perml);
  act0Tpb_deact: act0Tpb => restTpb; act0on*fTa0deact*act0Tpb;
  act0Tpb_activn: act0Tpb + drugTpbact + BlinTpbact -> actTpb + drugTpbact + BlinTpbact; act0on*kTact*((drugTpbact + BlinTpbact)*act0Tpb - fTadeact*actTpb);
  act0Tpb_apop: act0Tpb => ; fTa0apop*kTaapop*act0Tpb;
  act0Ttiss_apop: act0Ttiss => ; fTa0apop*kTaapop*act0Ttiss;
  act0Ttiss_activn: act0Ttiss + drugTtissact + BlinTtissact -> actTtiss + drugTtissact + BlinTtissact; act0on*kTact*((drugTtissact + BlinTtissact)*act0Ttiss - fTadeact*actTtiss);
  act0Ttiss_deact: act0Ttiss => restTtiss; act0on*fTa0deact*act0Ttiss;
  act0Ttraffic: act0Tpb + injection_effect + drug_effect -> act0Ttiss + injection_effect + drug_effect; tissue1on*act0on*kTrexit*Vpb*((1 + finj*injection_effect + fdrug*drug_effect)*act0Tpb/Vpb*KTrp - act0Ttiss/Vtissue);
  actTpb_prolif: actTpb => actTpb + act0Tpb; act0on*fTaprolif*kTprolif*actTpb;
  actTtiss_prolif: actTtiss => actTtiss + act0Ttiss; act0on*fTaprolif*kTprolif*actTtiss;
  UnnamedReaction_32: injection_effect => ; ln(2)/tinjhalf*injection_effect;
  actTtiss_prolif_2: actTtiss2 => actTtiss2 + act0Ttiss2; act0on*fTaprolif*kTprolif*actTtiss2;
  act0Ttraffic_2: act0Tpb + injection_effect + drug_effect -> act0Ttiss2 + injection_effect + drug_effect; tissue2on*act0on*kTrexit*Vpb*((1 + finj*injection_effect + fdrug*drug_effect)*act0Tpb/Vpb*KTrp2 - act0Ttiss2/Vtissue2);
  act0Ttiss_deact_2: act0Ttiss2 => restTtiss2; act0on*fTa0deact*act0Ttiss2;
  act0Ttiss_activn_2: act0Ttiss2 + drugTtissact2 + BlinTtissact2 -> actTtiss2 + drugTtissact2 + BlinTtissact2; act0on*kTact*((drugTtissact2 + BlinTtissact2)*act0Ttiss2 - fTadeact*actTtiss2);
  act0Ttiss_apop_2: act0Ttiss2 => ; fTa0apop*kTaapop*act0Ttiss2;
  actTtraffic_2: actTpb + injection_effect + drug_effect -> actTtiss2 + injection_effect + drug_effect; tissue2on*kTaexit*Vpb*((1 + fa0*(finj*injection_effect + fdrug*drug_effect))*actTpb/Vpb*KTrp2*fTap - actTtiss2/Vtissue2);
  Btiss_kill_2: actTtiss2 + drugBtisskill2 + Btiss2 + RTXt2_ugperml + BlinBtisskill2 => actTtiss2 + drugBtisskill2 + RTXt2_ugperml + BlinBtisskill2; fBkill*kBkill*(drugBtisskill2 + BlinBtisskill2 + RTXt2_ugperml/(Kmkill_rtx/1000 + RTXt2_ugperml))*Btiss2;
  Btraffic_2: Bpb => Btiss2; tissue2on*fBexit*kTaexit*Vpb*max(0, Bpb/Vpb*KBp2 - Btiss2/Vtissue2);
  restTtraffic_2: restTpb + injection_effect + drug_effect -> restTtiss2 + injection_effect + drug_effect; tissue2on*kTrexit*Vpb*((1 + finj*injection_effect + fdrug*drug_effect)*restTpb/Vpb*KTrp2 - restTtiss2/Vtissue2);
  UnnamedReaction_42: actTtiss2 + Btiss2 + drugBtisskill2 + TDBt2_ugperml => actTtiss2 + Btiss2 + drugBtisskill2 + TDBt2_ugperml; 0;
  UnnamedReaction_43: restTtiss2 + Btiss2 + drugTtissact2 + TDBt2_ugperml => restTtiss2 + Btiss2 + drugTtissact2 + TDBt2_ugperml; 0;
  Btiss_apop_2: Btiss2 => ; 0*fBprolif*kBprolif*Btiss2*kBapop_cll;
  Ttiss_activn_2: restTtiss2 + drugTtissact2 + BlinTtissact2 -> actTtiss2 + drugTtissact2 + BlinTtissact2; kTact*((drugTtissact2 + BlinTtissact2)*restTtiss2 - fTadeact*actTtiss2);
  Btiss_prolf_2: Btiss2 => 2 Btiss2; kBprolif*KBp2*Bpbref_perml*Vtissue2*max(0, 1 - Btiss2/(KBp2*Bpbref_perml*Vtissue2))^1;
  RTXdistr: RTXc_ugperkg -> RTXp_ugperkg; Cld_rtx*(RTXc_ugperkg/Vc_rtx - RTXp_ugperkg/Vp_rtx);
  RTXclear: RTXc_ugperkg -> ; (Cl_rtx + Vm_rtx/(Km_rtx + RTXc_ugperkg/Vc_rtx)/BW)/Vc_rtx*RTXc_ugperkg;
  UnnamedReaction_49: drug_effect => ; ln(2)/tinjhalf*drug_effect;
  B19no20tiss3_gen: => B19no20tiss3; Bpbref_perml*KBp3*B19no20_B1920_ratio*Vtissue3*(kBapop + kBapop/kBmat_kBapop_ratio)*(1 + 5*max(0, 1 - (Bpb + Btiss + Btiss2)/(Bpbref_perml*Vpb + KBp*Bpbo_perml*Vtissue + KBp2*Bpbo_perml*Vtissue2))^1);
  B19n020tiss3_mat: B19no20tiss3 => B1920tiss3; kBapop/kBmat_kBapop_ratio*B19no20tiss3;
  Btraffic_3_v1: B1920tiss3 => Bpb; tissue3on*fBtissue3_v1*kBtiss3exit*Vpb*max(0, B1920tiss3/Vtissue3 - Bpb/Vpb*KBp3);
  B19no20tiss3_apop: B19no20tiss3 => ; kBapop*B19no20tiss3*kBapop_cll;
  B1920tiss3_apop: B1920tiss3 => ; kBapop*B1920tiss3*kBapop_cll;
  restTtraffic_3: restTpb + injection_effect + drug_effect -> restTtiss3 + drug_effect + injection_effect; tissue3on*kTrexit*Vpb*((1 + finj*injection_effect + fdrug*drug_effect)*restTpb/Vpb*KTrp3 - restTtiss3/Vtissue3);
  B1920tiss3_kill: actTtiss3 + RTXt3_ugperml + drugBtisskill3 + B1920tiss3 + BlinBtisskill3 => actTtiss3 + RTXt3_ugperml + drugBtisskill3 + BlinBtisskill3; fBkill*kBkill*(drugBtisskill3 + BlinBtisskill3 + RTXt3_ugperml/(Kmkill_rtx/1000 + RTXt3_ugperml))*B1920tiss3;
  act0Ttraffic_3: act0Tpb + injection_effect + drug_effect -> act0Ttiss3 + injection_effect + drug_effect; tissue3on*act0on*kTrexit*Vpb*((1 + finj*injection_effect + fdrug*drug_effect)*act0Tpb/Vpb*KTrp3 - act0Ttiss3/Vtissue3);
  actTtraffic_3: actTpb + injection_effect + drug_effect -> actTtiss3 + drug_effect + injection_effect; tissue3on*kTaexit*Vpb*((1 + fa0*(finj*injection_effect + fdrug*drug_effect))*actTpb/Vpb*KTrp3*fTap - actTtiss3/Vtissue3);
  act0Ttiss_apop_3: act0Ttiss3 => ; fTa0apop*kTaapop*act0Ttiss3;
  act0Ttiss_activn_3: act0Ttiss3 + drugTtissact3 + BlinTtissact3 -> actTtiss3 + drugTtissact3 + BlinTtissact3; act0on*kTact*((drugTtissact3 + BlinTtissact3)*act0Ttiss3 - fTadeact*actTtiss3);
  act0Ttiss_deact_3: act0Ttiss3 => restTtiss3; act0on*fTa0deact*act0Ttiss3;
  Ttiss_activn_3: restTtiss3 + drugTtissact3 + BlinTtissact3 -> actTtiss3 + drugTtissact3 + BlinTtissact3; kTact*((drugTtissact3 + BlinTtissact3)*restTtiss3 - fTadeact*actTtiss3);
  actTtiss_prolif_3: actTtiss3 => act0Ttiss3 + actTtiss3; act0on*fTaprolif*kTprolif*actTtiss3;
  UnnamedReaction_64: drugTtissact3 + TDBt3_ugperml + restTtiss3 + B1920tiss3 => drugTtissact3 + TDBt3_ugperml + restTtiss3 + B1920tiss3; 0;
  Btiss3_19_kill: B19no20tiss3 + actTtiss3 + BlinBtisskill3 => actTtiss3 + BlinBtisskill3; fBkill*kBkill*BlinBtisskill3*B19no20tiss3;
  UnnamedReaction_66: drugBtisskill3 + TDBt3_ugperml + actTtiss3 + B1920tiss3 => drugBtisskill3 + TDBt3_ugperml + actTtiss3 + B1920tiss3; 0;
  UnnamedReaction_67: B19no20tiss3 + B1920tiss3 + B19tiss3 => B1920tiss3 + B19no20tiss3 + B19tiss3; 0;
  restTtiss_apop_v24: restTtiss => ; fapop_v24*fTrapop*kTaapop*Trpbref_perml*Vtissue*KTrp*max(0, restTtiss/(Trpbref_perml*Vtissue*KTrp) - 1);
  restTtiss_apop_v24_2: restTtiss2 => ; fapop_v24*fTrapop*kTaapop*Trpbref_perml*Vtissue2*KTrp2*max(0, restTtiss2/(Trpbref_perml*Vtissue2*KTrp2) - 1);
  actTtiss_apop_v24: actTtiss => ; fapop_v24*kTaapop*(actTtiss + fAICD*actTtiss^2/(KTrp*Vtissue*Trpbref_perml));
  actTtiss_apop_v24_2: actTtiss2 => ; fapop_v24*kTaapop*(actTtiss2 + fAICD*actTtiss2^2/(Vtissue2*KTrp2*Trpbref_perml));
  restTtiss_apop_v24_3: restTtiss3 => ; fapop_v24*fTrapop*kTaapop*Trpbref_perml*Vtissue3*KTrp3*max(0, restTtiss3/(Trpbref_perml*Vtissue3*KTrp3) - 1);
  actTtiss_apop_v24_3: actTtiss3 => ; fapop_v24*kTaapop*(actTtiss3 + fAICD*actTtiss3^2/(Vtissue3*KTrp3*Trpbref_perml));
  Bpb_prolif_test: => Bpb; tissue3on*fBtissue3_v1*kBprolif*kBapop_cll*Bpbref_perml*Vpb*max(0, 1 - Bpb/(Bpbref_perml*Vpb))^1;
  Blinclear: Blinc_ug -> ; Cl_blin*Blinc_ug/Vz_blin;
  UnnamedReaction_76: Bpb + BlinBpbkill + actTpb + Blinc_ngperml => Bpb + BlinBpbkill + actTpb + Blinc_ngperml; 0;
  UnnamedReaction_77: Blinc_ngperml + BlinTpbact + Bpb + restTpb => Blinc_ngperml + BlinTpbact + Bpb + restTpb; 0;
  UnnamedReaction_78: Btiss + Blint_ngperml + actTtiss + BlinBtisskill => BlinBtisskill + Blint_ngperml + actTtiss + Btiss; 0;
  UnnamedReaction_79: Btiss + restTtiss + Blint_ngperml + BlinTtissact => Blint_ngperml + Btiss + BlinTtissact + restTtiss; 0;
  UnnamedReaction_80: Blint2_ngperml + BlinTtissact2 + Btiss2 + restTtiss2 => Blint2_ngperml + BlinTtissact2 + Btiss2 + restTtiss2; 0;
  UnnamedReaction_81: Blint2_ngperml + BlinBtisskill2 + Btiss2 + actTtiss2 => BlinBtisskill2 + Blint2_ngperml + Btiss2 + actTtiss2; 0;
  UnnamedReaction_82: BlinBtisskill3 + Blint3_ngperml + actTtiss3 + B19tiss3 => BlinBtisskill3 + Blint3_ngperml + actTtiss3 + B19tiss3; 0;
  UnnamedReaction_83: BlinTtissact3 + Blint3_ngperml + restTtiss3 + B19tiss3 => BlinTtissact3 + Blint3_ngperml + restTtiss3 + B19tiss3; 0;
  B1920tiss3_prolf: => B1920tiss3; kBprolif*KBp3*Bpbref_perml*Vtissue3*max(0, 1 - B1920tiss3/(KBp3*Bpbref_perml*Vtissue3))^1;
  B19no20tiss3_prolif: => B19no20tiss3; kBprolif*KBp3*Bpbref_perml*B19no20_B1920_ratio*Vtissue3*max(0, 1 - B19no20tiss3/(KBp3*Bpbref_perml*B19no20_B1920_ratio*Vtissue3))^1;
  act0Ttumor_deact: act0Ttumor => restTtumor; act0on*fTa0deact*act0Ttumor;
  act0Ttumor_activn: act0Ttumor + drugTtumoract + BlinTtumoract -> actTtumor + drugTtumoract + BlinTtumoract; act0on*kTact*((drugTtumoract + BlinTtumoract)*act0Ttumor - fTadeact*actTtumor);
  actTtumor_prolif: actTtumor => act0Ttumor + actTtumor; act0on*fTaprolif*kTprolif*actTtumor;
  Ttumor_activn: restTtumor + drugTtumoract + BlinTtumoract -> actTtumor + drugTtumoract + BlinTtumoract; kTact*((drugTtumoract + BlinTtumoract)*restTtumor - fTadeact*actTtumor);
  UnnamedReaction_90: BlinTtumoract + Blintumor_ngperml + restTtumor + Btumor => BlinTtumoract + Blintumor_ngperml + Btumor + restTtumor; 0;
  UnnamedReaction_91: Blintumor_ngperml + Btumor + BlinBtumorkill + actTtumor => Blintumor_ngperml + BlinBtumorkill + actTtumor + Btumor; 0;
  UnnamedReaction_92: drugTtumoract + Btumor + restTtumor + TDBtumor_ugperml => drugTtumoract + Btumor + TDBtumor_ugperml + restTtumor; 0;
  UnnamedReaction_93: TDBtumor_ugperml + Btumor + actTtumor + drugBtumorkill => TDBtumor_ugperml + Btumor + drugBtumorkill + actTtumor; 0;
  Btumor_prolf: Btumor => 2 Btumor; kBtumorprolif*Btumor + 0*kBprolif*KBptumor*Bpbref_perml*Vtumor*max(0, 1 - Btumor/(KBptumor*Bpbref_perml*Vtumor))^1;
  Btumor_apop: Btumor => ; 0*fBprolif*kBprolif*Btumor;
  Btumor_kill: Btumor + actTtumor + BlinBtumorkill + drugBtumorkill + RTXtumor_ugperml => actTtumor + BlinBtumorkill + drugBtumorkill + RTXtumor_ugperml; fBkill*kBkill*(drugBtumorkill + BlinBtumorkill + RTXtumor_ugperml/(Kmkill_rtx/1000 + RTXtumor_ugperml))*Btumor;
  actTtumor_apop_v24: actTtumor => ; fapop_v24*kTaapop*(actTtumor + fAICD*actTtumor^2/(Vtumor*KTrptumor*Trpbref_perml));
  Btraffic_tumor: Bpb => Btumor; Bcell_tumor_trafficking_on*tumor_on*fBexit*kTaexit*Vpb*max(0, Bpb/Vpb*KBptumor - Btumor/Vtumor);
  restTtraffic_tumor: restTpb + drug_effect + injection_effect -> restTtumor + drug_effect + injection_effect; tumor_on*kTrexit*Vpb*((1 + finj*injection_effect + fdrug*drug_effect)*restTpb/Vpb*KTrptumor - restTtumor/Vtumor);
  actTtraffic_tumor: actTpb + drug_effect + injection_effect -> actTtumor + injection_effect + drug_effect; tumor_on*kTaexit*Vpb*((1 + fa0*(finj*injection_effect + fdrug*drug_effect))*actTpb/Vpb*KTrptumor*fTap - actTtumor/Vtumor);
  act0Ttraffic_tumor: act0Tpb + drug_effect + injection_effect -> act0Ttumor + injection_effect + drug_effect; tumor_on*act0on*kTrexit*Vpb*((1 + finj*injection_effect + fdrug*drug_effect)*act0Tpb/Vpb*KTrptumor - act0Ttumor/Vtumor);
  act0Ttumor_apop: act0Ttumor => ; fTa0apop*kTaapop*act0Ttumor;
  restTtumor_apop_v24: restTtumor => ; fapop_v24*fTrapop*kTaapop*Trpbref_perml*Vtumor*KTrptumor*max(0, restTtumor/(Trpbref_perml*Vtumor*KTrptumor) - 1);
  TDB_abs: TDBsc_ugperkg => TDBc_ugperkg; kabs_TDB*fbio_TDB*TDBsc_ugperkg;
  TDBSC_loss: TDBsc_ugperkg => ; kabs_TDB*(1 - fbio_TDB)*TDBsc_ugperkg;
  UnnamedReaction_106: => TDBc_ugperml_AUC; TDBc_ugperml;
  UnnamedReaction_107: => IL6pb; kIL6prod*actTpb/Vpb*(Bpb_perml/Bpbref_perml)*((TDBc_ugperml*1000)^ndrugactT/(KdrugactT^ndrugactT + (TDBc_ugperml*1000)^ndrugactT) + Blinc_ngperml^ndrugactT_blin/(Blinc_ngperml^ndrugactT_blin + KdrugactT_blin^ndrugactT_blin));
  UnnamedReaction_108: IL6pb => ; ln(2)/(thalfIL6/60/24)*IL6pb;
  UnnamedReaction_109: => IL6tiss; kIL6prod*actTtiss/Vtissue*(Btiss_perml/(Bpbref_perml*KBp))*((TDBt_ugperml*1000)^ndrugactT/(KdrugactT^ndrugactT + (TDBt_ugperml*1000)^ndrugactT) + Blint_ngperml^ndrugactT_blin/(Blint_ngperml^ndrugactT_blin + KdrugactT_blin^ndrugactT_blin));
  UnnamedReaction_110: IL6tiss => ; ln(2)/(thalfIL6/60/24)*IL6tiss;
  UnnamedReaction_111: => IL6tiss2; kIL6prod*actTtiss2/Vtissue2*(Btiss2_perml/(Bpbref_perml*KBp2))*((TDBt2_ugperml*1000)^ndrugactT/(KdrugactT^ndrugactT + (TDBt2_ugperml*1000)^ndrugactT) + Blint2_ngperml^ndrugactT_blin/(Blint2_ngperml^ndrugactT_blin + KdrugactT_blin^ndrugactT_blin));
  UnnamedReaction_112: IL6tiss2 => ; ln(2)/(thalfIL6/60/24)*IL6tiss2;
  UnnamedReaction_113: => IL6tiss3; kIL6prod*actTtiss3/Vtissue3*(B1920tiss3_perml/(Bpbref_perml*KBp3)*((TDBt3_ugperml*1000)^ndrugactT/(KdrugactT^ndrugactT + (TDBt3_ugperml*1000)^ndrugactT)) + B19tiss3_perml/(Bpbref_perml*KBp3*(1 + B19no20_B1920_ratio))*(Blint3_ngperml^ndrugactT_blin/(Blint3_ngperml^ndrugactT_blin + KdrugactT_blin^ndrugactT_blin)));
  UnnamedReaction_114: IL6tiss3 => ; ln(2)/(thalfIL6/60/24)*IL6tiss3;
  UnnamedReaction_115: => IL6tumor; kIL6prod*actTtumor/Vtumor*(Btumor_perml/(Bpbref_perml*KBptumor))*((TDBtumor_ugperml*1000)^ndrugactT/(KdrugactT^ndrugactT + (TDBtumor_ugperml*1000)^ndrugactT) + Blintumor_ngperml^ndrugactT_blin/(Blintumor_ngperml^ndrugactT_blin + KdrugactT_blin^ndrugactT_blin));
  UnnamedReaction_116: IL6tumor => ; ln(2)/(thalfIL6/60/24)*IL6tumor;

  // Unit definitions:
  unit MWDERIVEDUNIT_nanogram__milliliter = gram * 1e-3 dimensionless / metre^3; MWDERIVEDUNIT_nanogram__milliliter is "nanogram/milliliter";
  unit MWDERIVEDUNIT_1__day = 1.157407e-5 dimensionless / second; MWDERIVEDUNIT_1__day is "1/day";
  unit MWDERIVEDUNIT_milliliter__day__kilogram = metre^3 * 1.157407e-14 dimensionless / (gram * second); MWDERIVEDUNIT_milliliter__day__kilogram is "milliliter/day/kilogram";
  unit MWDERIVEDUNIT_milliliter__kilogram = metre^3 * 1e-9 dimensionless / gram; MWDERIVEDUNIT_milliliter__kilogram is "milliliter/kilogram";
  unit MWDERIVEDUNIT_1__milliliter = 1000000 dimensionless / metre^3; MWDERIVEDUNIT_1__milliliter is "1/milliliter";
  unit MWBUILTINPREFIX_milli_MWBUILTINUNIT_liter = metre^3 * 1e-6 dimensionless; MWBUILTINPREFIX_milli_MWBUILTINUNIT_liter is "milliliter";
  unit MWDERIVEDUNIT_microgram__day = gram * 1.157407e-11 dimensionless / second; MWDERIVEDUNIT_microgram__day is "microgram/day";
  unit MWDERIVEDUNIT_microgram__milliliter = gram * dimensionless / metre^3; MWDERIVEDUNIT_microgram__milliliter is "microgram/milliliter";
  unit MWBUILTINUNIT_minute = 60 second;
  unit MWBUILTINUNIT_day = 86400 second;
end
